# OpenSim document version 40000
InverseKinematicsTool:
  results_directory: ./
  constraint_weight: Inf
  accuracy: 1e-5
  marker_file: ../Data/S1/Test3/Static_Functional2_Marker.trc
  time_range: 16.88 16.89
  report_errors: true
  report_marker_locations: false
  IKTaskSet:
    IKMarkerTask RACR: apply=true weight=50
    IKMarkerTask LACR: apply=true weight=50
    IKMarkerTask CEV7: apply=true weight=5
    IKMarkerTask CLAV: apply=true weight=1
    IKMarkerTask RSJC: apply=true weight=1
    IKMarkerTask RSAA: apply=true weight=1
    IKMarkerTask RLHE: apply=true weight=1
    IKMarkerTask RMHE: apply=true weight=1
    IKMarkerTask RRSP: apply=true weight=10
    IKMarkerTask RUSP: apply=true weight=1
    IKMarkerTask LSJC: apply=true weight=1
    IKMarkerTask LLHE: apply=true weight=1
    IKMarkerTask LMHE: apply=true weight=1
    IKMarkerTask LRSP: apply=true weight=10
    IKMarkerTask LUSP: apply=true weight=1
    IKMarkerTask RASI: apply=true weight=50
    IKMarkerTask LASI: apply=true weight=50
    IKMarkerTask RPSI: apply=true weight=25
    IKMarkerTask LPSI: apply=true weight=25
    IKMarkerTask LHJC: apply=true weight=100
    IKMarkerTask RHJC: apply=true weight=100
    IKMarkerTask RLAT: apply=true weight=1
    IKMarkerTask RIAT: apply=true weight=1
    IKMarkerTask RLFC: apply=true weight=50
    IKMarkerTask RSAT: apply=true weight=1
    IKMarkerTask RFIB: apply=true weight=50
    IKMarkerTask RLML: apply=true weight=50
    IKMarkerTask RMML: apply=true weight=1
    IKMarkerTask RCAL: apply=true weight=20
    IKMarkerTask RTOE: apply=true weight=20
    IKMarkerTask RMT5: apply=true weight=20
    IKMarkerTask LLAT: apply=true weight=1
    IKMarkerTask LSAT: apply=true weight=1
    IKMarkerTask LLFC: apply=true weight=50
    IKMarkerTask LIAT: apply=true weight=1
    IKMarkerTask LFIB: apply=true weight=50
    IKMarkerTask LLML: apply=true weight=50
    IKMarkerTask LMML: apply=true weight=1
    IKMarkerTask LCAL: apply=true weight=20
    IKMarkerTask LTOE: apply=true weight=20
    IKMarkerTask LMT5: apply=true weight=20
    IKMarkerTask LABK: apply=true weight=1
    IKMarkerTask RUHD: apply=true weight=20
    IKMarkerTask LUHD: apply=true weight=20
    IKMarkerTask RASH: apply=true weight=1
    IKMarkerTask LASH: apply=true weight=1
    IKMarkerTask RABK: apply=true weight=1
    IKMarkerTask RIAA: apply=true weight=1
    IKMarkerTask LSAA: apply=true weight=1
    IKMarkerTask LIAA: apply=true weight=1
