# OpenSim document version 40000
MarkerSet:
  Marker RACR: torso (0.008865031 0.4333519 0.1712305)
  Marker LACR: torso (0.00886503 0.433352 -0.17123)
  Marker CEV7: torso (-0.085 0.435 0.00165426)
  Marker CLAV: torso (0.05200219 0.3854381 0)
  Marker RSJC: humerus_r (0 0 0)
  Marker RSAA: humerus_r (0.04148773 -0.06931249 0.00180336) fixed=true
  Marker RLHE: humerus_r (0.015 -0.28 0.04)
  Marker RMHE: humerus_r (0.00225 -0.286 -0.046)
  Marker RRSP: radius_r (0.0005 -0.225 0.05)
  Marker RUSP: radius_r (-0.022 -0.225 -0.022)
  Marker LSJC: humerus_l (0 0 0)
  Marker LLHE: humerus_l (0.015 -0.28 -0.04)
  Marker LMHE: humerus_l (0.00225 -0.286 0.046)
  Marker LRSP: radius_l (0.0005 -0.225 -0.05)
  Marker LUSP: radius_l (-0.022 -0.225 0.022)
  Marker RASI: pelvis (0.031061 -0.00536857 0.128535)
  Marker LASI: pelvis (0.03106096 -0.005368566 -0.1285346)
  Marker RPSI: pelvis (-0.179329 0.0272877 0.045)
  Marker LPSI: pelvis (-0.179329 0.02728772 -0.045)
  Marker LHJC: femur_l (0 0 0)
  Marker RHJC: femur_r (0 0 0)
  Marker RLAT: femur_r (0.01066081 -0.1443664 0.0979922)
  Marker RIAT: femur_r (0.05724794 -0.2499454 0.01752002)
  Marker RLFC: femur_r (0 -0.404 0.07232019)
  Marker RSAT: femur_r (0.05989015 -0.09214734 0.04202311)
  Marker RFIB: tibia_r (-0.02331 -0.0574356 0.07182322)
  Marker RLML: tibia_r (-0.0161718 -0.383613 0.05941292)
  Marker RMML: tibia_r (0.00600055 -0.381542 -0.0419807)
  Marker RCAL: calcn_r (-0.025 0.02 -0.005)
  Marker RTOE: calcn_r (0.210758 0.0177577 -0.02255065)
  Marker RMT5: calcn_r (0.137932 0.00508051 0.066279)
  Marker LLAT: femur_l (0.01057402 -0.2049121 -0.07108532)
  Marker LSAT: femur_l (0.08 -0.1254838 -0.03540766)
  Marker LLFC: femur_l (0 -0.404 -0.0723202)
  Marker LIAT: femur_l (0.06318459 -0.2714994 -0.0216055)
  Marker LFIB: tibia_l (-0.02331 -0.0574356 -0.0718232)
  Marker LLML: tibia_l (-0.0161718 -0.383613 -0.0594129)
  Marker LMML: tibia_l (0.00600055 -0.3815417 0.04198074)
  Marker LCAL: calcn_l (-0.02499975 0.01829758 0.004999992)
  Marker LTOE: calcn_l (0.2115505 0.01775768 0.02402367)
  Marker LMT5: calcn_l (0.1379321 0.005080513 -0.06627896)
  Marker LABK: torso (-0.09196003 0.3203607 -0.05496323)
  Marker RUHD: ulna_r (-0.04428417 0.01084481 0.002433266)
  Marker LUHD: ulna_l (-0.0442842 0.0108448 -0.00243327)
  Marker RASH: tibia_r (0.03881523 -0.2567413 0.01089677)
  Marker LASH: tibia_l (0.07494013 -0.1876234 -0.008671184)
  Marker RABK: torso (-0.1079372 0.2434012 0.06686708)
  Marker RIAA: humerus_r (-0.003381886 -0.1755707 0.03844141)
  Marker LSAA: humerus_l (0.03994813 -0.08250185 -0.002258033)
  Marker LIAA: humerus_l (0.01383331 -0.1715504 -0.03948662)
