# OpenSim document version 40000
ScaleTool S1_Scaled:
  mass: 94 [kg]
  height: 1800
  age: 25
  GenericModelMaker:
    marker_set_file: REAL_Ref_Markers.xml
  ModelScaler:
    apply: true
    scaling_order: measurements
    marker_file: C:/MyCloud/OneDriveUcf/Real/Simulation/Passive_Parameter_prediction/Model/../Data/S1/Test3/Static_Functional2_Marker.trc
    time_range: 16.88 16.89
    preserve_mass_distribution: true
    output_model_file: Ref_Scaled
    output_scale_file: Ref_Scaled.xml
    MeasurementSet marker_measurements:
      Measurement torso_Z: apply=true
        MarkerPair: markers=(LACR RACR)
        BodyScale torso: axes=Z
      Measurement pelvis_X: apply=true
        MarkerPair: markers=(RASI RPSI)
        MarkerPair: markers=(LASI LPSI)
        BodyScale pelvis: axes=X
      Measurement pelvis_Y: apply=true
        MarkerPair: markers=(LPSI LHJC)
        MarkerPair: markers=(RPSI RHJC)
        MarkerPair: markers=(RASI RHJC)
        MarkerPair: markers=(LASI LHJC)
        BodyScale pelvis: axes=Y
      Measurement pelvis_z: apply=true
        MarkerPair: markers=(RASI LASI)
        MarkerPair: markers=(RHJC LHJC)
        BodyScale pelvis: axes=Z
      Measurement thigh: apply=true
        MarkerPair: markers=(LHJC LLFC)
        MarkerPair: markers=(RHJC RLFC)
        BodyScale femur_r: axes=(X Y Z)
        BodyScale femur_l: axes=(X Y Z)
      Measurement shank: apply=true
        MarkerPair: markers=(LFIB LMML)
        MarkerPair: markers=(RFIB RMML)
        BodyScale tibia_r: axes=(X Y Z)
        BodyScale talus_r: axes=(X Y Z)
        BodyScale tibia_l: axes=(X Y Z)
        BodyScale talus_l: axes=(X Y Z)
      Measurement foot: apply=true
        MarkerPair: markers=(LCAL LMT5)
        MarkerPair: markers=(LCAL LTOE)
        MarkerPair: markers=(RCAL RTOE)
        MarkerPair: markers=(RCAL RMT5)
        BodyScale calcn_r: axes=(X Y Z)
        BodyScale toes_r: axes=(X Y Z)
        BodyScale calcn_l: axes=(X Y Z)
        BodyScale toes_l: axes=(X Y Z)
      Measurement humerus: apply=true
        MarkerPair: markers=(LSJC LMHE)
        MarkerPair: markers=(LSJC LLHE)
        MarkerPair: markers=(RSJC RLHE)
        MarkerPair: markers=(RSJC RMHE)
        BodyScale humerus_r: axes=(X Y Z)
        BodyScale humerus_l: axes=(X Y Z)
      Measurement radius_ulna: apply=true
        MarkerPair: markers=(LUHD LUSP)
        MarkerPair: markers=(LUHD LRSP)
        MarkerPair: markers=(RUHD RUSP)
        MarkerPair: markers=(RUHD RRSP)
        BodyScale ulna_r: axes=(X Y Z)
        BodyScale radius_r: axes=(X Y Z)
        BodyScale hand_r: axes=(X Y Z)
        BodyScale ulna_l: axes=(X Y Z)
        BodyScale radius_l: axes=(X Y Z)
        BodyScale hand_l: axes=(X Y Z)
      Measurement torso_X: apply=true
        MarkerPair: markers=(CEV7 CLAV)
        BodyScale torso: axes=X
      Measurement torso_Y: apply=true
        MarkerPair: markers=(CEV7 RASI)
        MarkerPair: markers=(CEV7 LASI)
        BodyScale torso: axes=Y
      Measurement: apply=false
  MarkerPlacer:
    apply: true
    marker_file: C:/MyCloud/OneDriveUcf/Real/Simulation/Passive_Parameter_prediction/Model/../Data/S1/Test3/Static_Functional2_Marker.trc
    time_range: 16.88 16.89
    output_motion_file: Relocated_Marker.mot
    output_model_file: Ref_Model.osim
    max_marker_movement: -1
    IKTaskSet scale_ik_run:
      IKMarkerTask RACR: apply=true weight=70
      IKMarkerTask LACR: apply=true weight=70
      IKMarkerTask CEV7: apply=false weight=10
      IKMarkerTask CLAV: apply=true weight=25
      IKMarkerTask RSJC: apply=true weight=200
      IKMarkerTask RSAA: apply=false weight=1
      IKMarkerTask RLHE: apply=true weight=50
      IKMarkerTask RMHE: apply=true weight=50
      IKMarkerTask RRSP: apply=true weight=50
      IKMarkerTask RUSP: apply=true weight=50
      IKMarkerTask LSJC: apply=true weight=200
      IKMarkerTask LLHE: apply=true weight=50
      IKMarkerTask LMHE: apply=true weight=50
      IKMarkerTask LRSP: apply=true weight=50
      IKMarkerTask LUSP: apply=true weight=50
      IKMarkerTask RASI: apply=true weight=20
      IKMarkerTask LASI: apply=true weight=20
      IKMarkerTask RPSI: apply=false weight=50
      IKMarkerTask LPSI: apply=false weight=50
      IKMarkerTask LHJC: apply=true weight=400
      IKMarkerTask RHJC: apply=true weight=400
      IKMarkerTask RLAT: apply=false weight=1
      IKMarkerTask RIAT: apply=false weight=1
      IKMarkerTask RLFC: apply=false weight=50
      IKMarkerTask RSAT: apply=false weight=1
      IKMarkerTask RFIB: apply=true weight=70
      IKMarkerTask RLML: apply=true weight=50
      IKMarkerTask RMML: apply=true weight=50
      IKMarkerTask RCAL: apply=true weight=25
      IKMarkerTask RTOE: apply=true weight=25
      IKMarkerTask RMT5: apply=true weight=25
      IKMarkerTask LLAT: apply=false weight=10
      IKMarkerTask LSAT: apply=false weight=1
      IKMarkerTask LLFC: apply=false weight=50
      IKMarkerTask LIAT: apply=false weight=1
      IKMarkerTask LFIB: apply=true weight=70
      IKMarkerTask LLML: apply=true weight=50
      IKMarkerTask LMML: apply=true weight=50
      IKMarkerTask LCAL: apply=true weight=25
      IKMarkerTask LTOE: apply=true weight=25
      IKMarkerTask LMT5: apply=true weight=25
      IKMarkerTask LABK: apply=false weight=5
      IKMarkerTask RUHD: apply=true weight=5
      IKMarkerTask LUHD: apply=true weight=5
      IKMarkerTask RASH: apply=false weight=5
      IKMarkerTask LASH: apply=false weight=1
      IKMarkerTask RABK: apply=false weight=50
      IKMarkerTask RIAA: apply=false weight=1
      IKMarkerTask LSAA: apply=false weight=1
      IKMarkerTask LIAA: apply=false weight=1
      IKCoordinateTask [values shared by the 7 below unless stated]: apply=false value_type=default_value value=0
      IKCoordinateTask pelvis_tilt: weight=5
      IKCoordinateTask hip_flexion_r: weight=5
      IKCoordinateTask knee_angle_r: weight=10
      IKCoordinateTask ankle_angle_r: weight=10
      IKCoordinateTask hip_flexion_l: weight=5
      IKCoordinateTask knee_angle_l: weight=10
      IKCoordinateTask ankle_angle_l: weight=10
